# ------------------------ INITIALIZATION ----------------------------
units           real
dimension       3
boundary        p p p
atom_style      full

# ----------------------- Read Structure file ------------------------
#read_data       polymer-6_water-336.data
#variable        elem string "C F O S H"

read_data       restart.data
variable        elem string "H O F C S"

replicate       1 1 1

# ------------------------ initialize system -------------------------

variable         Td equal 300.0 # [K]

# ------------------------ FORCE FIELDS ------------------------------
pair_style      reax/c NULL
pair_coeff      * * ffield.reax.035.CHOSFClN ${elem}

neighbor        1.0 bin
neigh_modify    every 10 delay 0 check no

# ------------------------- MINIMIZATION -----------------------------
# relax structure, 0 K
#fix             f1 all qeq/reax 1 0.0 10.0 1e-6 reax/c
#fix             f2 all box/relax iso 0.0
#minimize        1.0e-6 1.0e-6 1000 100000
#unfix           f1
#unfix           f2

# ------------------------- SETTINGS ---------------------------------
reset_timestep  0

timestep        0.1 # 0.1 [fs]

velocity        all create 10.0 4928459 rot yes mom yes dist gaussian

#fix             1 all nve
fix             2 all qeq/reax 1 0.0 10.0 1.0e-6 reax/c
#fix             3 all temp/berendsen 298.15 298.15 50.0
#fix             3 all press/berendsen iso 1.0 1.0 1500.0
#fix            3 all nvt temp ${Td} ${Td} 500.0 tchain 1
fix             3 all npt temp ${Td} ${Td} 100.0 iso 1.0 1.0 1000.0 drag 1.0

thermo          100
thermo_style    custom step temp ke pe press lx ly lz

dump            d1 all cfg 100 cfg/run.equil.*.cfg mass type xs ys zs id type q
dump_modify     d1 element ${elem}

run             200000 # 20 [ps]
# ------------------------- Ende -------------------------------------
